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/batch
! ANSYS input file written by Workbench version 2022 R2
! File used for geometry attach: C:\Users\Admin\PycharmProjects\Github\thesis_files\master thesisio\ansys\Thesis_files\dp0\SYS-6\DM\SYS-6.scdoc
/title,Thesis--Static Structural (E5)
/COM,/COM,     ANSYSMotion, 2022.2
/com,--- Data in consistent NMM units. See Solving Units in the help system for more information.
/units,MPA
/prep7
! Turn off shape checking because checks already performed inside WB mesher.
! See help system for more information.
SHPP,OFF,,NOWARN
etcon,set             ! allow ANSYS to choose best KEYOP's for 180x elements, resets any applicable keyopt to MAPDL defaults
/com,*********** Nodes for the whole assembly ***********
nblock,3,,9971
(1i9,3e20.9e3)
        1     1.000000000E+01    -1.000000000E+01    -1.000000000E+01
        2     1.000000000E+01    -1.000000000E+01     0.000000000E+00
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-1
/com,*********** Elements for Body 1 "SYS-3\Rectangular Beam" ***********
et,1,186
keyo,1,2,1          ! set full integration on SOLID186
eblock,19,solid,,1600
(19i9)
        1        1        1        1        0        0        0        0       20        0        1        1     2098     2495     2520     1188     2395     2494     2523
     2530     8324     9021     2531     6496     8919     9019     6497     2529     8323     9018     9062
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-1
/com,*********** Send User Defined Coordinate System(s) ***********
local,12,0,0.,-20.,0.,0.,0.,0.
local,13,0,0.,0.,0.,0.,0.,0.
local,14,0,0.,20.,0.,0.,0.,0.
csys,0
toffst,273.15,  ! Temperature offset from absolute zero
/com,*********** Set Reference Temperature ***********
tref,22.
/com,*********** Send Materials ***********
MP,EX,1,200000,	! tonne s^-2 mm^-1
MP,NUXY,1,0.25,


TB,PLAS,1,1,22,MISO
TBTEMP,22
TBPT,,0,350
TBPT,,0.00199,351.3
TBPT,,0.00218,352.8
TBPT,,0.0024,354.3
TBPT,,0.00264,355.8
TBPT,,0.00289,357.3
TBPT,,0.00318,358.8
TBPT,,0.00348,360.3
TBPT,,0.00382,361.8
TBPT,,0.00419,363.4
TBPT,,0.00459,364.9
TBPT,,0.00503,366.5
TBPT,,0.0063,370.5
TBPT,,0.00788,374.6
TBPT,,0.01224,383.4
TBPT,,0.01884,393.1
TBPT,,0.02873,404.2
TBPT,,0.04336,417.6
TBPT,,0.06474,434.1
TBPT,,0.09553,455.4
TBPT,,0.11548,468.6
TBPT,,0.13908,483.8

!************************* Model Summary ********************
!SYS-3\Rectangular Beam,	AISI 1020 steel,	matid,	1
!************************* End Model Summary ********************
/com,*********** Send Named Selection as Node Component ***********
CMBLOCK,FULL_BODY,NODE,     4898
(8i10)
       892       893       894       895       896       897       898       899
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/com,*********** Send Named Selection as Node Component ***********
CMBLOCK,TOP_FACE,NODE,     1409
(8i10)
      1593      1594      1595      1596      1597      1598      1599      1600
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/com,*********** Send Named Selection as Node Component ***********
CMBLOCK,RIGHT_END_EDGE,NODE,        9
(8i10)
      1492      2498      2499      2500      2501      7209      9025      9027
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/com,*********** Send Named Selection as Node Component ***********
CMBLOCK,LEFT_END_EDGE,NODE,        9
(8i10)
      1592      2494      2495      2496      2497      7408      9018      9020
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/com,*********** Send Named Selection as Node Component ***********
CMBLOCK,CONCENTRATED_LOAD1,NODE,        9
(8i10)
      1693      1894      1895      1896      1897      7609      7964      7966
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CMBLOCK,SELECTION,NODE,        1
(8i10)
      1995
/com,*********** Fixed Supports ***********
CMBLOCK,_FIXEDSU,NODE,        9
(8i10)
      1592      2494      2495      2496      2497      7408      9018      9020
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cmsel,s,_FIXEDSU
d,all,all
nsel,all
/com,******* Constant Zero Displacement Y *******
CMBLOCK,_DISPZEROUY,NODE,        9
(8i10)
      1492      2498      2499      2500      2501      7209      9025      9027
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cmsel,s,_DISPZEROUY
d,all,uy,0
nsel,all
/com,******* Constant Zero Displacement Z *******
CMBLOCK,_DISPZEROUZ,NODE,        9
(8i10)
      1492      2498      2499      2500      2501      7209      9025      9027
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cmsel,s,_DISPZEROUZ
d,all,uz,0
nsel,all
/com,*********** Define Force Using Surface Effect Elements ***********
local,15,0,0.,0.,0.,0.,0.,0.
csys,0
et,2,156
keyop,2,5,1         !  No orientation node
eblock,10,,,4
(15i9)
     3233        2        2        2       15     1895     1894     7964
     3234        2        2        2       15     1895     1896     7966
     3235        2        2        2       15     1896     1897     7968
     3236        2        2        2       15     1897     1693     7609
-1
esel,s,type,,2
keyop,2,2,1                ! Apply load in local coordinate system
keyop,2,7,1                ! Use original area so load is constant in large deformation
esel,all

*DIM,_loadvari636y,TABLE,3,1,1,TIME
! Time values
*TAXIS,_loadvari636y(1),1,0.,1.,2.
! Load values
_loadvari636y(1,1,1) = 0.
_loadvari636y(2,1,1) = -500.
_loadvari636y(3,1,1) = 0.


tblist
fini
/com,****************************************************************************
/com,*************************    SOLUTION       ********************************
/com,****************************************************************************
/solu
antype,0                   ! static analysis
nlgeom,on                  ! Turn on Large Deformation Effects
_thickRatio=  1     ! Ratio of thick parts in the model
eqsl,pcg,1e-8,,,,,,1
cntr,print,1               ! print out contact info and also make no initial contact an error
dmpoption,emat,no             ! Don't combine emat file for DANSYS
dmpoption,esav,no             ! Don't combine esav file for DANSYS
nldiag,cont,iter           ! print out contact info each equilibrium iteration
rescontrol,define,last,last,,dele	   ! Program Controlled
/com,****************************************************
/com,******************* SOLVE FOR LS 1 OF 2 ****************
esel,s,type,,2
nsle
sfe,all,1,pres,1,0.
sfe,all,2,pres,1,%_loadvari636y%
sfe,all,3,pres,1,0.
nsel,all
esel,all
autots,on                   ! User turned on automatic time stepping
nsub,30,1000,30,OFF
time,1.
outres,erase
outres,all,none
outres,nsol,all,
outres,rsol,all
outres,eangl,all
outres,etmp,all
outres,veng,all
outres,strs,all,
outres,epel,all,
outres,eppl,all,
outres,cont,all,
! *********** WB SOLVE COMMAND ***********
! check interactive state
*get,ANSINTER_,active,,int
*if,ANSINTER_,ne,0,then
/eof
*endif
solve
/com *************** Write FE CONNECTORS *********
CEWRITE,file,ce,,INTE
/com,****************************************************
/com,*************** FINISHED SOLVE FOR LS 1 *************
/com,****************************************************
/com,******************* SOLVE FOR LS 2 OF 2 ****************
autots,on                  ! Workbench Program Controlled automatic time stepping
nsub,5,1000,1              ! due to presence of nonlinear materials
time,2.
outres,erase
outres,all,none
outres,nsol,all,
outres,rsol,all
outres,eangl,all
outres,etmp,all
outres,veng,all
outres,strs,all,
outres,epel,all,
outres,eppl,all,
outres,cont,all,
solve
/com,****************************************************
/com,*************** FINISHED SOLVE FOR LS 2 *************
*get,_NSOLTHREADS,active,0,ntfs
*get,_NSOLPROCESSES,active,0,npfs
*get,_PCGITER,active,,solu,cgiter
/post1
fini
