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/batch
! ANSYS input file written by Workbench version 2022 R2
! File used for geometry attach: C:\Users\Admin\Desktop\master thesis\ANSYS\bending_beam_self_study_files\dp0\SYS-2\DM\SYS-2.agdb
/title,bending_beam_self_study--Static Structural (D5)
/COM,/COM,     ANSYSMotion, 2022.2
/com,--- Data in consistent NMM units. See Solving Units in the help system for more information.
/units,MPA
/prep7
! Turn off shape checking because checks already performed inside WB mesher.
! See help system for more information.
SHPP,OFF,,NOWARN
etcon,set             ! allow ANSYS to choose best KEYOP's for 180x elements, resets any applicable keyopt to MAPDL defaults
/com,*********** Nodes for the whole assembly ***********
nblock,3,,26043
(1i9,3e20.9e3)
        1     3.000000119E+02    -2.079482658E+01    -1.418301459E+01
        2     3.000000119E+02    -2.493397143E+01    -1.831843995E+01
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-1
/com,*********** Nodes for all Remote Points ***********
nblock,3
(1i9,3e20.9e3)
    23677     3.000000119E+02     1.109986051E-15    -2.774965127E-16
    23678     5.000000000E+02     0.000000000E+00     5.081112767E-16
    23679     3.000000119E+02     1.109986051E-15    -2.774965127E-16
    23680     5.000000000E+02     0.000000000E+00     5.081112767E-16
    23681     5.000000000E+02     0.000000000E+00     5.081112767E-16
-1
/com,*********** Elements for Body 1 "Solid" ***********
et,1,186
keyo,1,2,1          ! set full integration on SOLID186
eblock,19,solid,,3696
(19i9)
        1        1        1        1        0        0        0        0       20        0     1401    10965    11003    10935    10937    11118    11156    11088    11090
    23279    23278    23079    23163    11228    23676    23516    23599    23598    23675    23510    23515
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-1
/com,*********** Elements for Body 2 "Solid" ***********
et,2,186
keyo,2,2,1          ! set full integration on SOLID186
eblock,19,solid,,1400
(19i9)
        2        2        2        2        0        0        0        0       20        0        1     1674     1700     1656     1658     1759     1785     1741     1743
     6508     6507     6380     6428     1805     6719     6619     6666     6665     6718     6613     6618
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-1
/com,*********** Send User Defined Coordinate System(s) ***********
local,12,0,300.000011920929,1.10998605080352e-015,-2.77496512700879e-016,0.,0.,0.
local,13,0,500.,0.,5.08111276707646e-016,0.,0.,0.
local,14,0,150.000005960449,6.40747132491449e-016,9.63529522543532e-017,0.,0.,90.
local,15,0,400.000005960425,1.51727681473364e-015,-2.38177174405863e-016,0.,0.,90.
csys,0
toffst,273.15,  ! Temperature offset from absolute zero
/com,*********** Set Reference Temperature ***********
tref,22.
/com,*********** Send Materials ***********
MP,EX,1,204820,	! tonne s^-2 mm^-1
MP,NUXY,1,0.33,

MP,EX,2,65000,	! tonne s^-2 mm^-1
MP,NUXY,2,0.3,

!************************* Model Summary ********************
!Solid,	hollow,	matid,	1
!Solid,	steel,	matid,	2
!************************* End Model Summary ********************
/com,*********** Create Contact "Contact Region" ***********
*set,tid,4
*set,cid,3
r,tid
r,cid
et,tid,170
et,cid,174
eblock,10,,,86
(15i9)
     7186        4        4        4        0     6944     6889     6844     6842    11756    11616    11495    11754
     7187        4        4        4        0     6775     6944     6842     6774    11751    11754    11490    11330
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-1
eblock,10,,,86
(15i9)
     7272        3        3        3        0     6944     6889     6844     6842    11756    11616    11495    11754
     7273        3        3        3        0     6775     6944     6842     6774    11751    11754    11490    11330
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-1
eblock,10,,,70
(15i9)
     7358        3        4        3        0      169      116       85       81     1833     2097     2018     2204
     7359        3        4        3        0      167      169       81       82     1832     2204     2010     2200
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-1
eblock,10,,,70
(15i9)
     7428        4        3        4        0      169      116       85       81     1833     2097     2018     2204
     7429        4        3        4        0      167      169       81       82     1832     2204     2010     2200
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-1
keyo,cid,8,2               ! auto create asymmetric contact (from Program Controlled setting)
keyo,cid,10,0              ! adjust contact stiffness each NR iteration (from Program Controlled setting)
keyo,cid,12,5              ! bonded always
keyo,cid,18,1              ! small sliding turned on by application
keyo,cid,2,0               ! augmented Lagrange (from Program Controlled setting)
keyo,cid,4,0               ! on Gauss point (from Program Controlled setting)
keyo,cid,9,1               ! ignore initial gaps/penetration
keyo,cid,7,0               ! No Prediction
rmod,tid,3,10.      ! FKN
rmod,tid,5,0.       ! ICONT
rmod,tid,6,0.       ! PINB
rmod,tid,10,0.      ! CNOF
rmod,tid,12,0.      ! FKT
rmod,tid,36,95      ! WB DSID
rmod,cid,3,10.      ! FKN
rmod,cid,5,0.       ! ICONT
rmod,cid,6,0.       ! PINB
rmod,cid,10,0.      ! CNOF
rmod,cid,12,0.      ! FKT
rmod,cid,36,95      ! WB DSID
nsel,all
esel,all
/com,*********** Fixed Supports ***********
CMBLOCK,_FIXEDSU,NODE,      437
(8i10)
     11004     11005     11006     11007     11008     11009     11010     11011
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cmsel,s,_FIXEDSU
d,all,all
nsel,all
/com,*********** Create Remote Point "Internal Remote Point 3" ***********
! -------- Remote Point Used by "Moment" --------
*set,tid,6
*set,cid,5
et,cid,174
et,tid,170
keyo,tid,2,1               ! Don't fix the pilot node
keyo,tid,4,111111
keyo,cid,12,5              ! Bonded Contact
keyo,cid,4,1               ! Deformable RBE3 style load
keyo,cid,2,2               ! MPC style contact
eblock,10,,,132
(15i9)
     7498        5        5        5        0     7024     6947     6892     6888    11188    11760    11621    11915
     7499        5        5        5        0     7022     7024     6888     6889    11189    11915    11613    11911
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-1
*set,_npilot,23679
_npilot161=_npilot
type,tid
mat ,cid
real,cid
tshape,pilo
en,7630,_npilot
tshape
/com,*********** Create Remote Point "Internal Remote Point 4" ***********
! -------- Remote Point Used by "Moment 2" --------
*set,tid,8
*set,cid,7
et,cid,174
et,tid,170
keyo,tid,2,1               ! Don't fix the pilot node
keyo,tid,4,111111
keyo,cid,12,5              ! Bonded Contact
keyo,cid,4,1               ! Deformable RBE3 style load
keyo,cid,2,2               ! MPC style contact
eblock,10,,,70
(15i9)
     7631        7        7        7        0     1759     1785     1741     1743     1805     6719     6619     6666
     7632        7        7        7        0     1785     1784     1742     1741     1804     6717     6614     6719
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-1
*set,_npilot,23680
_npilot164=_npilot
type,tid
mat ,cid
real,cid
tshape,pilo
en,7701,_npilot
tshape
/com,*********** Create Remote Point "Remote Point" ***********
*set,tid,10
*set,cid,9
et,cid,174
et,tid,170
keyo,tid,2,1               ! Don't fix the pilot node
keyo,tid,4,111111
keyo,cid,12,5              ! Bonded Contact
keyo,cid,4,1               ! Deformable RBE3 style load
keyo,cid,2,2               ! MPC style contact
eblock,10,,,70
(15i9)
     7702        9        9        9        0     1759     1785     1741     1743     1805     6719     6619     6666
     7703        9        9        9        0     1785     1784     1742     1741     1804     6717     6614     6719
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-1
*set,_npilot,23681
_npilot175=_npilot
type,tid
mat ,cid
real,cid
tshape,pilo
en,7772,_npilot
tshape
! ****** Begin Command Snippet ******
!   Commands inserted into this file will be executed just after the remote point definition.
!   Constraint equation based contact elements are used to define the remote point.
!   The material, type, and real number for the contact/beam elements are equal to the parameter "cid".
!   The type number for the target(pilot) element is equal to the parameter "tid".
!   The remote point node number is equal to "_npilot"

!   Active UNIT system in Workbench when this object was created:  Metric (mm, kg, N, s, mV, mA)
!   NOTE:  Any data that requires units (such as mass) is assumed to be in the consistent solver unit system.
!                See Solving Units in the help system for more information.


measure_pilot=_npilot

! ****** End   Command Snippet ******
/com,*********** Construct Moment Using Remote Attachment ***********
/com,*********** Construct Moment Using Remote Attachment ***********
fini
/com,****************************************************************************
/com,*************************    SOLUTION       ********************************
/com,****************************************************************************
/solu
antype,0                   ! static analysis
_thickRatio=  1     ! Ratio of thick parts in the model
eqsl,pcg,1e-8,,,,,,1
cntr,print,1               ! print out contact info and also make no initial contact an error
dmpoption,emat,no             ! Don't combine emat file for DANSYS
dmpoption,esav,no             ! Don't combine esav file for DANSYS
nldiag,cont,iter           ! print out contact info each equilibrium iteration
rescontrol,,none                 ! Do not keep any restart files
/com,****************************************************
/com,******************* SOLVE FOR LS 1 OF 1 ****************
nsel,s,node,,23679
f,all,mx,5000000.
f,all,my,0.
f,all,mz,0.
nsel,s,node,,23680
f,all,mx,3000000.
f,all,my,0.
f,all,mz,0.
nsel,all
nsub,1,1,1
time,1.
outres,erase
outres,all,none
outres,nsol,all,
outres,rsol,all
outres,eangl,all
outres,etmp,all
outres,veng,all
outres,strs,all,
outres,epel,all,
outres,eppl,all,
outres,cont,all,
! *********** WB SOLVE COMMAND ***********
! check interactive state
*get,ANSINTER_,active,,int
*if,ANSINTER_,ne,0,then
/eof
*endif
solve
/com *************** Write FE CONNECTORS *********
CEWRITE,file,ce,,INTE
/com,****************************************************
/com,*************** FINISHED SOLVE FOR LS 1 *************
*get,_NSOLTHREADS,active,0,ntfs
*get,_NSOLPROCESSES,active,0,npfs
*get,_PCGITER,active,,solu,cgiter
/post1
! ****** Begin Command Snippet ******
!   Commands inserted into this file will be executed immediately after the ANSYS /POST1 command.

!   Active UNIT system in Workbench when this object was created:  Metric (mm, kg, N, s, mV, mA)
!   NOTE:  Any data that requires units (such as mass) is assumed to be in the consistent solver unit system.
!                See Solving Units in the help system for more information.


my_rotX_rad=ROTX(measure_pilot)
my_rotX_deg=ROTX(measure_pilot)*57.29
! ****** End   Command Snippet ******
fini
