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/batch
! ANSYS input file written by Workbench version 2022 R2
! File used for geometry attach: C:\Users\Admin\PycharmProjects\Github\thesis_files\master thesisio\ansys\design1_files\dp0\SYS-2\DM\SYS-2.agdb
/title,design1--Static Structural (B5)
/COM,/COM,     ANSYSMotion, 2022.2
/com,--- Data in consistent NMM units. See Solving Units in the help system for more information.
/units,MPA
/prep7
! Turn off shape checking because checks already performed inside WB mesher.
! See help system for more information.
SHPP,OFF,,NOWARN
etcon,set             ! allow ANSYS to choose best KEYOP's for 180x elements, resets any applicable keyopt to MAPDL defaults
/com,*********** Nodes for the whole assembly ***********
nblock,3,,9971
(1i9,3e20.9e3)
        1     1.000000000E+01     1.000000000E+01     1.000000000E+01
        2     1.000000000E+01     0.000000000E+00     1.000000000E+01
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-1
/com,*********** Nodes for all Remote Points ***********
nblock,3
(1i9,3e20.9e3)
     9066     0.000000000E+00     1.999999955E+01     5.000000000E+02
-1
/com,*********** Elements for Body 1 "Solid" ***********
et,1,186
keyo,1,2,1          ! set full integration on SOLID186
eblock,19,solid,,1600
(19i9)
        1        1        1        1        0        0        0        0       20        0        1        1     2296     2495     2514     1188     2493     2494     2523
     2530     8721     9021     2531     6496     9017     9019     6497     2529     8720     9018     9051
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-1
/com,*********** Send User Defined Coordinate System(s) ***********
local,12,0,0.,20.,0.,0.,0.,0.
local,13,0,0.,-20.,0.,0.,0.,0.
local,14,0,0.,19.9999995529652,500.,0.,0.,0.
csys,0
toffst,273.15,  ! Temperature offset from absolute zero
/com,*********** Set Reference Temperature ***********
tref,22.
/com,*********** Send Materials ***********
MP,EX,1,200000,	! tonne s^-2 mm^-1
MP,NUXY,1,0.3,


TB,PLAS,1,1,22,MISO
TBTEMP,22
TBPT,,0,250
TBPT,,0.00199,250.8
TBPT,,0.00224,255.1
TBPT,,0.00251,259.4
TBPT,,0.00282,263.7
TBPT,,0.00315,268
TBPT,,0.00352,272.3
TBPT,,0.00393,276.7
TBPT,,0.00437,281
TBPT,,0.00485,285.4
TBPT,,0.00538,289.8
TBPT,,0.00596,294.2
TBPT,,0.00765,305.3
TBPT,,0.00973,316.6
TBPT,,0.01536,339.7
TBPT,,0.02355,364.1
TBPT,,0.03516,390.2
TBPT,,0.05123,418.7
TBPT,,0.07296,450.7
TBPT,,0.10169,487.2
TBPT,,0.11913,507.7
TBPT,,0.13885,529.9

!************************* Model Summary ********************
!Solid,	non lina,	matid,	1
!************************* End Model Summary ********************
CMBLOCK,SELECTION,NODE,        1
(8i10)
      1040
/com,*********** Fixed Supports ***********
CMBLOCK,_FIXEDSU,NODE,        9
(8i10)
      1486      1487      1488      1492      1593      7194      7195      7197
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cmsel,s,_FIXEDSU
d,all,all
nsel,all
/com,******* Constant Zero Displacement X *******
CMBLOCK,_DISPZEROUX,NODE,        9
(8i10)
      1489      1490      1491      1592      1693      7201      7202      7204
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cmsel,s,_DISPZEROUX
d,all,ux,0
nsel,all
/com,******* Constant Zero Displacement Y *******
CMBLOCK,_DISPZEROUY,NODE,        9
(8i10)
      1489      1490      1491      1592      1693      7201      7202      7204
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cmsel,s,_DISPZEROUY
d,all,uy,0
nsel,all
/com,*********** Create Remote Point "Remote Point" ***********
*set,tid,3
*set,cid,2
et,cid,174
et,tid,170
keyo,tid,2,1               ! Don't fix the pilot node
keyo,tid,4,0               ! Activate all DOF's due to large deformation
keyo,cid,12,5              ! Bonded Contact
keyo,cid,4,1               ! Deformable RBE3 style load
keyo,cid,2,2               ! MPC style contact
eblock,10,,,400
(15i9)
     3234        2        2        2        0     2523     1188     2493     2494     6497     6496     9017     9019
     3235        2        2        2        0     1188     1185     2492     2493     6489     6490     9016     6496
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-1
*set,_npilot,9066
_npilot116=_npilot
type,tid
mat ,cid
real,cid
tshape,pilo
en,3634,_npilot
tshape
/com,*********** Construct Remote Force ***********

*DIM,_loadvari114x,TABLE,3,1,1,TIME
! Time values
*TAXIS,_loadvari114x(1),1,0.,1.,2.
! Load values
_loadvari114x(1,1,1) = 0.
_loadvari114x(2,1,1) = 0.
_loadvari114x(3,1,1) = 0.


*DIM,_loadvari114y,TABLE,3,1,1,TIME
! Time values
*TAXIS,_loadvari114y(1),1,0.,1.,2.
! Load values
_loadvari114y(1,1,1) = 0.
_loadvari114y(2,1,1) = -40000.
_loadvari114y(3,1,1) = 0.


*DIM,_loadvari114z,TABLE,3,1,1,TIME
! Time values
*TAXIS,_loadvari114z(1),1,0.,1.,2.
! Load values
_loadvari114z(1,1,1) = 0.
_loadvari114z(2,1,1) = 0.
_loadvari114z(3,1,1) = 0.


tblist
fini
/com,****************************************************************************
/com,*************************    SOLUTION       ********************************
/com,****************************************************************************
/solu
antype,0                   ! static analysis
nlgeom,on                  ! Turn on Large Deformation Effects
_thickRatio=  1     ! Ratio of thick parts in the model
eqsl,pcg,1e-8,,,,,,1
cntr,print,1               ! print out contact info and also make no initial contact an error
dmpoption,emat,no             ! Don't combine emat file for DANSYS
dmpoption,esav,no             ! Don't combine esav file for DANSYS
nldiag,cont,iter           ! print out contact info each equilibrium iteration
rescontrol,define,last,last,,dele	   ! Program Controlled
/com,****************************************************
/com,******************* SOLVE FOR LS 1 OF 2 ****************
nsel,s,node,,9066
f,all,fx,%_loadvari114x%
f,all,fy,%_loadvari114y%
f,all,fz,%_loadvari114z%
nsel,all
autots,on                   ! User turned on automatic time stepping
nsub,30,1000,30,OFF
time,1.
outres,erase
outres,all,none
outres,nsol,all,
outres,rsol,all
outres,eangl,all
outres,etmp,all
outres,veng,all
outres,strs,all,
outres,epel,all,
outres,eppl,all,
outres,cont,all,
! *********** WB SOLVE COMMAND ***********
! check interactive state
*get,ANSINTER_,active,,int
*if,ANSINTER_,ne,0,then
/eof
*endif
solve
/com *************** Write FE CONNECTORS *********
CEWRITE,file,ce,,INTE
/com,****************************************************
/com,*************** FINISHED SOLVE FOR LS 1 *************
/com,****************************************************
/com,******************* SOLVE FOR LS 2 OF 2 ****************
autots,on                  ! Workbench Program Controlled automatic time stepping
nsub,5,1000,1              ! due to presence of nonlinear materials
time,2.
outres,erase
outres,all,none
outres,nsol,all,
outres,rsol,all
outres,eangl,all
outres,etmp,all
outres,veng,all
outres,strs,all,
outres,epel,all,
outres,eppl,all,
outres,cont,all,
solve
/com,****************************************************
/com,*************** FINISHED SOLVE FOR LS 2 *************
*get,_NSOLTHREADS,active,0,ntfs
*get,_NSOLPROCESSES,active,0,npfs
*get,_PCGITER,active,,solu,cgiter
/post1
fini
